P0 := 3
P1 := 1
P2 := 0
P3 := 1
Given
0.1*P0 + 0.3*P1 + 0.2*P2 + 0.3*P3 == P0
0.2*P0 + 0.1*P1 + 0.2*P2 + 0.3*P3 == P1
0.4*P0 + 0.4*P1 + 0.2*P2 + 0.3*P3 == P2
0.3*P0 + 0.2*P1 + 0.4*P2 + 0.1*P3 == P3
P0 + P1 + P2 + P3 == 1
D := Find(P0, P1, P2, P3)
D = [0.22402; 0.205352; 0.311761; 0.258867]
p0k0 := 1
p1k0 := 0
p2k0 := 0
p3k0 := 0
p := [0.1, 0.2, 0.4, 0.3; 0.3, 0.1, 0.4, 0.2; 0.2, 0.2, 0.2, 0.4; 0.3, 0.3, 0.3, 0.1]
p0k1 := p0k0*p[0, 0] + p1k0*p[1, 0] + p2k0*p[2, 0] + p3k0*p[3, 0]
p0k1 = 0.1
p1k1 := p0k0*p[0, 1] + p1k0*p[1, 1] + p2k0*p[2, 1] + p3k0*p[3, 1]
p1k1 = 0.2
p2k1 := p0k0*p[0, 2] + p1k0*p[1, 2] + p2k0*p[2, 2] + p3k0*p[3, 2]
p2k1 = 0.4
p3k1 := p0k0*p[0, 3] + p1k0*p[1, 3] + p2k0*p[2, 3] + p3k0*p[3, 3]
p3k1 = 0.3
p0k2 := p0k1*p[0, 0] + p1k1*p[1, 0] + p2k1*p[2, 0] + p3k1*p[3, 0]
p0k2 = 0.24
p1k2 := p0k1*p[0, 1] + p1k1*p[1, 1] + p2k1*p[2, 1] + p3k1*p[3, 1]
p1k2 = 0.21
p2k2 := p0k1*p[0, 2] + p1k1*p[1, 2] + p2k1*p[2, 2] + p3k1*p[3, 2]
p2k2 = 0.29
p3k2 := p0k1*p[0, 3] + p1k1*p[1, 3] + p2k1*p[2, 3] + p3k1*p[3, 3]
p3k2 = 0.26
p0k3 := p0k2*p[0, 0] + p1k2*p[1, 0] + p2k2*p[2, 0] + p3k2*p[3, 0]
p0k3 = 0.223
p1k3 := p0k2*p[0, 1] + p1k2*p[1, 1] + p2k2*p[2, 1] + p3k2*p[3, 1]
p1k3 = 0.205
p2k3 := p0k2*p[0, 2] + p1k2*p[1, 2] + p2k2*p[2, 2] + p3k2*p[3, 2]
p2k3 = 0.316
p3k3 := p0k2*p[0, 3] + p1k2*p[1, 3] + p2k2*p[2, 3] + p3k2*p[3, 3]
p3k3 = 0.256
