A := 20
B := 5
C := 2
D := 12
T := 480
λ := 1/10 = 0.1
x := 6.5
μ := 1/x = 0.153846
m := 1
ρ := λ/(m*μ) = 0.65
P0 := 1 - ρ = 0.35
υ := 1
ε := 0.133
q := ρ^2*(ε^2 + υ^2)/(2*(1 - ρ)) = 0.614248
Potc := 0
Pobs := 1
U := ρ*(1 - Potc) = 0.65
S := m*U = 0.65
k := q + S = 1.26425
γ := μ*S = 0.1
λ*(1 - Potc) = 0.1
w := q/γ = 6.14248
t := w + x = 12.6425
k/γ = 12.6425
V := γ*D*T = 576
Zobcl := γ*C*T = 96
Zekcp := (S*A + (m - S)*B)*8 = 118
Pribil := V - Zobcl - Zekcp = 362
P2 := ρ^2*(1 - ρ) = 0.147875
j := 0
Pj0 := ρ^j*(1 - ρ) = 0.35
j := 1
Pj1 := ρ^j*(1 - ρ) = 0.2275
j := 2
Pj2 := ρ^j*(1 - ρ) = 0.147875
j := 3
Pj3 := ρ^j*(1 - ρ) = 0.0961188
j := 4
Pj4 := ρ^j*(1 - ρ) = 0.0624772
j := 5
Pj5 := ρ^j*(1 - ρ) = 0.0406102
j := 6
Pj6 := ρ^j*(1 - ρ) = 0.0263966
Pjbolshe3 := 1 - Pj0 - Pj1 - Pj2 - Pj3 - Pj4 = 0.116029
Pjmenshe4 := P0 + Pj1 + Pj2 + Pj3 + Pj4 + Pj5 = 0.924581
Pbezojidania := P0 + Pj1 = 0.5775
_______________________________________________________________________________________
Y := 8
x := 12
A := 20
B := 5
C := 2
D := 12
m := 2
Potc := 0
Pobsl := 1
λ := 1/Y = 0.125
μ := 1/x = 0.0833333
ρ := λ/(m*μ) = 0.75
P0 := ((ρ*m)^0/0! + (m*ρ)^1/1! + (m*ρ)^m/(m!*(1 - ρ)))^-1 = 0.142857
q := P0*ρ*(m*ρ)^m/(m!*(1 - ρ)^2) = 1.92857
U := ρ*(1 - Potc) = 0.75
S := m*U = 1.5
k := q + S = 3.42857
γ := μ*S = 0.125
λ*(1 - Potc) = 0.125
w := q/γ = 15.4286
t := w + x = 27.4286
k/γ = 27.4286
V := γ*D*T = 720
Zobcl := γ*C*T = 120
Zekcp := (S*A + (1 - S)*B)*8 = 220
Pribil := V - Zobcl - Zekcp = 380
Pj0 := 1/0!*P0 = 0.142857
Pj1 := m*ρ/1!*P0 = 0.214286
Pj2 := (m*ρ)^2/m!*P0 = 0.160714
Podinsv := Pj0 + Pj1 = 0.357143
j := 3
Pj3 := (m*ρ)^j/(m^(j - m)*m!)*P0 = 0.120536
j := 4
Pj4 := (m*ρ)^j/(m^(j - m)*m!)*P0 = 0.0904018
j := 5
Pj5 := (m*ρ)^j/(m^(j - m)*m!)*P0 = 0.0678013
j := 6
Pj6 := (m*ρ)^j/(m^(j - m)*m!)*P0 = 0.050851
j := 7
Pj7 := (m*ρ)^j/(m^(j - m)*m!)*P0 = 0.0381383
Pbezocheredi := P0 + Pj1 = 0.357143
Pozidaniya5 := 1 - (Pj0 + Pj1 + Pj2 + Pj3 + Pj4 + Pj5 + Pj6 + Pj7) = 0.114415
Pmenshe3 := P0 + Pj1 + Pj2 + Pj3 = 0.638393
Pbolsje3 := 1 - Pmenshe3 = 0.361607
m := 1
λ := 1/Y = 0.125
μ := 1/x = 0.0833333
ρ := λ/(m*μ) = 1.5
m := 2
λ := 1/Y + 1/7 = 0.267857
μ := 1/x = 0.0833333
ρ := λ/(m*μ) = 1.60714
_______________________________________________________________________________________
YA := 15
XA := 4
YB := 20
XB := 5
δ := 0.5
λA := 1/YA = 0.0666667
λB := 1/YB = 0.05
λ := λA + λB = 0.116667
m := 1
PA := λA/λ = 0.571429
PB := λB/λ = 0.428571
xA := (PA*XA) = 2.28571
xB := PB*XB = 2.14286
x := PA*XA + PB*XB = 4.42857
DA := δ^2 = 0.25
DB := 1/3 = 0.333333
αA := DA + XA^2 = 16.25
αB := DB + XB^2 = 25.3333
α := αA*PA + αB*PB = 20.1429
D := α - x^2 = 0.530612
μB := 1/XB = 0.2
ε := D^(1/2)/x = 0.164485
μ := 1/x = 0.225806
υ := 1
μA := 1/XA = 0.25
ρ := λ/(m*μ) = 0.516667
P0 := 1 - ρ = 0.483333
μA := 1/xA = 0.4375
μB := 1/xB = 0.466667
q := ρ^2*(ε^2 + υ^2)/(2*(1 - ρ)) = 0.283621
Potc := 0
Pobs := 1
U := ρ*(1 - Potc) = 0.516667
S := m*U = 0.516667
k := q + S = 0.800287
γ := μ*S = 0.116667
λ*(1 - Potc) = 0.116667
w := q/γ = 2.43103
t := w + x = 6.85961
k/γ = 6.85961
ρA := λA/μA = 0.152381
ρB := λB/μB = 0.107143
ρ := ρA + ρB = 0.259524
εA := δ/x = 0.112903
εB := 0.115
wA := (ρA*XA*(1 + εA^2) + ρB*XB*(1 + εB^2))/(2*(1 - ρA)) = 0.684324
wB := (ρA*XA*(1 + εA^2) + ρB*XB*(1 + εB^2))/(2*(1 - ρA - ρB)*(1 - ρA)) = 0.924168
w := (λA*wA + λB*wB)/λ = 0.787114
PA*wA + PB*wB = 0.787114
tA := wA + XA = 4.68432
tB := wB + XB = 5.92417
t := (λA*tA + λB*tB)/λ = 5.21569
PA*tA + PB*tB = 5.21569
kA := λA*tA = 0.312288
kB := λB*tB = 0.296208
k := kA + kB = 0.608497
SA := ρA = 0.152381
SB := ρB = 0.107143
S := ρ = 0.259524
qA := kA - SA = 0.159907
qB := kB - SB = 0.189066
q := qA + qB = 0.348973
γA := λA = 0.0666667
γB := λB = 0.05
γ := λ = 0.116667
P0 := 1 - ρ = 0.740476
UA := ρA = 0.152381
UB := ρB = 0.107143
U := ρ = 0.259524
wA := ρA*XA*(1 + εA^2)/(2*(1 - ρA)) = 0.364134
wB := XB*ρA/(1 - ρA) + (ρA*XA*(1 + εA^2) + ρB*XB*(1 + εB^2))/(2*(1 - ρA)*(1 - ρA - ρB)) = 1.82304
w := (λA*wA + λB*wB)/λ = 0.989381
PA*wA + PB*wB = 0.989381
tA := wA + xA = 2.64985
tB := wB + xB = 3.9659
t := (λA*tA + λB*tB)/λ = 3.21387
PA*tA + PB*tB = 3.21387
kA := λA*tA = 0.176657
kB := λB*tB = 0.198295
k := kA + kB = 0.374952
SA := ρA = 0.152381
SB := ρB = 0.107143
S := ρ = 0.259524
qA := kA - SA = 0.0242756
qB := kB - SB = 0.0911522
q := qA + qB = 0.115428
γA := λA = 0.0666667
γB := λB = 0.05
γ := λ = 0.116667
P0 := 1 - ρ = 0.740476
UA := ρA = 0.152381
UB := ρB = 0.107143
U := ρ = 0.259524
